*Heading
** Job name: cross-hole Model name: Model-1
** Generated by: Abaqus/CAE 6.12-2
*Preprint, echo=NO, model=NO, history=NO, contact=NO
**
** PARTS
**
*Part, name=specimen
*Node
      1,   16.1611652,   16.1611652
      2,   7.07106781,   7.07106781
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*Element, type=CPS4
1, 25,  1, 26, 57
2, 26,  2, 27, 57
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*Element, type=CPS4, elset=PHANTOM
1001, 25,  1, 26, 57
1002, 26,  2, 27, 57
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*Nset, nset=specimen, generate
  1,  64,   1
*Elset, elset=specimen, generate
  1,  40,   1
** Section: sec
*Solid Section, elset=specimen, material=jeklo
0.8,
*Solid Section, elset=PHANTOM, material=PHANTOM
1.E-12,
*End Part
**
**
** ASSEMBLY
**
*Assembly, name=Assembly
**
*Instance, name=specimen-1, part=specimen
*End Instance
**
*Node
      1,          30.,           0.,           0.
*Node
      2,           0.,          30.,           0.
*Node
      3,         -30.,  -1.77635684e-15,           0.
*Node
      4,           0.,         -30.,           0.
*Nset, nset=ROI, instance=specimen-1, generate
  1,  64,   1
*Elset, elset=ROI, instance=specimen-1, generate
  1,  40,   1
*Nset, nset=levo, instance=specimen-1
 20, 21, 24, 49, 56
*Elset, elset=levo, instance=specimen-1
 28, 29, 39, 40
*Nset, nset=desno, instance=specimen-1
  4,  5, 18, 29, 43
*Elset, elset=desno, instance=specimen-1
  4,  5, 18, 19
*Nset, nset=spodaj, instance=specimen-1
  8,  9, 23, 33, 53
*Elset, elset=spodaj, instance=specimen-1
  8,  9, 34, 35
*Nset, nset=zgoraj, instance=specimen-1
 14, 15, 19, 39, 46
*Elset, elset=zgoraj, instance=specimen-1
 14, 15, 23, 24
*Nset, nset=RP-desno
 1,
*Nset, nset=RP-zgoraj
 2,
*Nset, nset=RP-spodaj
 4,
*Nset, nset=RP-levo
 3,
*Elset, elset=_desno_S2, internal, instance=specimen-1
  4, 18
*Elset, elset=_desno_S1, internal, instance=specimen-1
  5, 19
*Surface, type=ELEMENT, name=desno
_desno_S2, S2
_desno_S1, S1
*Elset, elset=_zgoraj_S2, internal, instance=specimen-1
 14, 23
*Elset, elset=_zgoraj_S1, internal, instance=specimen-1
 15, 24
*Surface, type=ELEMENT, name=zgoraj
_zgoraj_S2, S2
_zgoraj_S1, S1
*Elset, elset=_spodaj_S2, internal, instance=specimen-1
  8, 34
*Elset, elset=_spodaj_S1, internal, instance=specimen-1
  9, 35
*Surface, type=ELEMENT, name=spodaj
_spodaj_S2, S2
_spodaj_S1, S1
*Elset, elset=_levo_S2, internal, instance=specimen-1
 28, 39
*Elset, elset=_levo_S1, internal, instance=specimen-1
 29, 40
*Surface, type=ELEMENT, name=levo
_levo_S2, S2
_levo_S1, S1
** Constraint: CP-desno
*Coupling, constraint name=CP-desno, ref node=RP-desno, surface=desno
*Kinematic
** Constraint: CP-levo
*Coupling, constraint name=CP-levo, ref node=RP-levo, surface=levo
*Kinematic
** Constraint: CP-spodaj
*Coupling, constraint name=CP-spodaj, ref node=RP-spodaj, surface=spodaj
*Kinematic
** Constraint: CP-zgoraj
*Coupling, constraint name=CP-zgoraj, ref node=RP-zgoraj, surface=zgoraj
*Kinematic
*End Assembly
**
** MATERIALS
**
*Material, name=jeklo
*Elastic
200000., 0.3
*Plastic
 100.,0.
1100.,1.
*Material, name=PHANTOM
*USER MATERIAL, CONSTANTS=1
1.0
*Depvar
1
*User Output Variables
      5,
*INITIAL CONDITIONS,TYPE=SOLUTION
specimen-1.PHANTOM, 1.0
** ----------------------------------------------------------------
**
** STEP: loading
**
*Step, name=loading, nlgeom=YES, inc=100000
*Static
0.1, 1., 1e-05, 0.1
**
** BOUNDARY CONDITIONS
**
** Name: RP-desno Type: Displacement/Rotation
*Boundary
RP-desno, 1, 1, 5.5
RP-desno, 2, 2
RP-desno, 6, 6
** Name: RP-levo Type: Displacement/Rotation
*Boundary
RP-levo, 1, 1, -5.5
RP-levo, 2, 2
RP-levo, 6, 6
** Name: RP-spodaj Type: Displacement/Rotation
*Boundary
RP-spodaj, 1, 1
RP-spodaj, 2, 2, -5.5
RP-spodaj, 6, 6
** Name: RP-zgoraj Type: Displacement/Rotation
*Boundary
RP-zgoraj, 1, 1
RP-zgoraj, 2, 2, 5.5
RP-zgoraj, 6, 6
**
** OUTPUT REQUESTS
**
*Restart, write, frequency=0
**
** FIELD OUTPUT: F-Output-1
**
*Output, field
*Node Output, nset=ROI
COORD, U
*Element Output, elset=ROI, directions=YES
LE, PEEQ, S, STH, COORD
*Element Output,elset=specimen-1.PHANTOM
UVARM, COORD
**
** FIELD OUTPUT: F-Output-2
**
*Node Output, nset=RP-desno
RF, U
**
** FIELD OUTPUT: F-Output-3
**
*Node Output, nset=RP-zgoraj
RF, U
**
** HISTORY OUTPUT: H-Output-1
**
*Output, history, variable=PRESELECT
*End Step
